;; 1. Based on: 25
;; 2. Description:
;;    New simulated data set
;; 3. Label:
;;    SimVal base model
;------------------------------------------------------------------------------
$PROBLEM    run 1
$INPUT ID TIME AMT EVID RATE FOOD DV FREMTYPE
$DATA frem_final_data.csv IGNORE=@
$SUBROUTINE ADVAN2 TRANS2
$PK
;;; MATFOOD-DEFINITION START
IF(FOOD.EQ.1) MATFOOD = 1  ; Most common
IF(FOOD.EQ.0) MATFOOD = ( 1 + THETA(6))
;;; MATFOOD-DEFINITION END

;;; MAT-RELATION START
MATCOVTIME = MATFOOD
;;; MAT-RELATION END


;;; FRELFOOD-DEFINITION START
IF(FOOD.EQ.1) FRELFOOD = 1  ; Most common
IF(FOOD.EQ.0) FRELFOOD = ( 1 + THETA(7))
;;; FRELFOOD-DEFINITION END

;;; FREL-RELATION START
FRELCOVTIME = FRELFOOD
;;; FREL-RELATION END

TVFREL  = THETA(1)
TVCL    = THETA(2)
TVV     = THETA(3)
TVMAT   = THETA(4)
TVD1    = THETA(5)

;MU_1  = LOG(TVRUV)
MU_2  = TVD1
MU_3  = LOG(TVCL)
MU_4  = LOG(TVV)
MU_5  = LOG(TVMAT)

D1FR  = MU_2                   + ETA(2)
FREL  = TVFREL*FRELCOVTIME
CL    = EXP(MU_3               + ETA(3))
V     = EXP(MU_4               + ETA(4))
MAT   = MATCOVTIME * EXP(MU_5  + ETA(5))
D1    = MAT*(1-D1FR)

F1    = FREL
KA    = 1 / (MAT-D1)
S2    = V

      MU_6 = THETA(8)
      COV6 = MU_6 + ETA(6)
      MU_7 = THETA(9)
      COV7 = MU_7 + ETA(7)
      MU_8 = THETA(10)
      COV8 = MU_8 + ETA(8)
      MU_9 = THETA(11)
      COV9 = MU_9 + ETA(9)
      MU_10 = THETA(12)
      COV10 = MU_10 + ETA(10)
      MU_11 = THETA(13)
      COV11 = MU_11 + ETA(11)
      MU_12 = THETA(14)
      COV12 = MU_12 + ETA(12)
      MU_13 = THETA(15)
      COV13 = MU_13 + ETA(13)
      MU_14 = THETA(16)
      COV14 = MU_14 + ETA(14)
$ERROR
CP    = A(2)*1000 / V
IPRED = LOG(CP + 0.00001)
Y     = IPRED + EPS(1) * EXP(ETA(1))

;;;FREM CODE BEGIN COMPACT
      IF(FREMTYPE.EQ.100) THEN
;       WT
        Y = COV6 + EPS(2)
        IPRED = COV6
      ENDIF
      IF(FREMTYPE.EQ.200) THEN
;       AGE
        Y = COV7 + EPS(2)
        IPRED = COV7
      ENDIF
      IF(FREMTYPE.EQ.300) THEN
;       BMI
        Y = COV8 + EPS(2)
        IPRED = COV8
      ENDIF
      IF(FREMTYPE.EQ.400) THEN
;       SEX
        Y = COV9 + EPS(2)
        IPRED = COV9
      ENDIF
      IF(FREMTYPE.EQ.500) THEN
;       SMOK
        Y = COV10 + EPS(2)
        IPRED = COV10
      ENDIF
      IF(FREMTYPE.EQ.600) THEN
;       NCIL_1
        Y = COV11 + EPS(2)
        IPRED = COV11
      ENDIF
      IF(FREMTYPE.EQ.700) THEN
;       NCIL_2
        Y = COV12 + EPS(2)
        IPRED = COV12
      ENDIF
      IF(FREMTYPE.EQ.800) THEN
;       RACEL_2
        Y = COV13 + EPS(2)
        IPRED = COV13
      ENDIF
      IF(FREMTYPE.EQ.900) THEN
;       RACEL_3
        Y = COV14 + EPS(2)
        IPRED = COV14
      ENDIF
;;;FREM CODE END COMPACT
$THETA 1 FIX  ; 1 TV_BASE1
$THETA 6.17206  ; 2 TV_BASE2
$THETA 121.358  ; 3 TV_BASE3
$THETA 1.91756  ; 4 TV_BASE4
$THETA 0.676682  ; 5 TV_BASE5
$THETA -0.0521041  ; 6 TV_BASE6
$THETA 0.152505  ; 7 TV_BASE7
$THETA 86.8  ; 8 TV_WT
$THETA 43.218691588785  ; 9 TV_AGE
$THETA 30.1689170182841  ; 10 TV_BMI
$THETA 1.44342105263158  ; 11 TV_SEX
$THETA 0.0394736842105263  ; 12 TV_SMOK
$THETA 0.155862068965517  ; 13 TV_NCIL_1
$THETA 0.0220689655172414  ; 14 TV_NCIL_2
$THETA 0.197771587743733  ; 15 TV_RACEL_2
$THETA 0.0236768802228412  ; 16 TV_RACEL_3
$OMEGA BLOCK(1)
0.054943
$OMEGA BLOCK(1)
1e-04
$OMEGA BLOCK(3)
0.183099
0.140718 0.200553   ; 3 BSV_BASE3
0.012395 0.0258711 0.047017   ; 4 BSV_BASE4
$OMEGA BLOCK(9)   ; 5 BSV_BASE5
428.139   ; 6 BSV_WT
1e-05 181.553208022682   ; 7 BSV_AGE
1e-05 1e-05 38.2448212198649   ; 8 BSV_BMI
1e-05 1e-05 1e-05 0.247123985853963   ; 9 BSV_SEX
1e-05 1e-05 1e-05 1e-05 0.0379654670272519   ; 10 BSV_SMOK
1e-05 1e-05 1e-05 1e-05 1e-05 0.131750809678034   ; 11 BSV_NCIL_1
1e-05 1e-05 1e-05 1e-05 1e-05 1e-05 0.0216117355686797   ; 12 BSV_NCIL_2
1e-05 1e-05 1e-05 1e-05 1e-05 1e-05 1e-05 0.158879267141409   ; 13 BSV_RACEL_2
1e-05 1e-05 1e-05 1e-05 1e-05 1e-05 1e-05 1e-05 0.023148525852457   ; 14 BSV_RACEL_3
$SIGMA  0.0321471  ;     1. RUV
$SIGMA 0.0000001 FIX
$ESTIMATION METHOD=IMPMAP AUTO=1 RANMETHOD=3P INTER NOABORT PRINT=1
            NOCOV=1 ISAMPEND=100 NITER=50 ISAMPLE=300
$ESTIMATION METHOD=IMPMAP INTER EONLY=1 NITER=50 ISAMPLE=10000 NOCOV=0
;            PHITYPE=1
;$COVARIANCE PRINT=E MATRIX=S UNCONDITIONAL
