Mon Nov 14 16:49:45 CET 2022
;; 1. Based on:
;; 2. Description:
;;    Removing FFEM WT and instead estimate it in rge FREM model.
;; 3. Label:
;;    SimVal base model
;------------------------------------------------------------------------------
$PROBLEM    run 1
$INPUT      NO ID STUDYID TAD TIME DAY AMT RATE ODV DV EVID BLQ DOSE
            FOOD FORM TYPE WT HT LBWT BSA SEX RACE AGE AST ALT BILI
            CRCL BMI NCI GENO ETHNIC SMOK RACEL GENOL NCIL
$DATA      DAT-1-MI-PMX-2-new.csv IGNORE=@ IGNORE(BLQ.EQN.1)
$SUBROUTINE ADVAN2 TRANS2
$PK
;;; MATFOOD-DEFINITION START
IF(FOOD.EQ.1) MATFOOD = 1  ; Most common
IF(FOOD.EQ.0) MATFOOD = ( 1 + THETA(6))
;;; MATFOOD-DEFINITION END

;;; MAT-RELATION START
MATCOVTIME = MATFOOD
;;; MAT-RELATION END

;;; FRELFOOD-DEFINITION START
IF(FOOD.EQ.1) FRELFOOD = 1  ; Most common
IF(FOOD.EQ.0) FRELFOOD = ( 1 + THETA(7))
;;; FRELFOOD-DEFINITION END

;;; FREL-RELATION START
FRELCOVTIME = FRELFOOD
;;; FREL-RELATION END

TVFREL  = THETA(1)
TVCL    = THETA(2)
TVV     = THETA(3)
TVMAT   = THETA(4)
TVD1    = THETA(5)

;MU_1  = LOG(TVRUV)
MU_2  = TVD1
MU_3  = LOG(TVFREL)
MU_4  = LOG(TVCL)
MU_5  = LOG(TVV)
MU_6  = LOG(TVMAT)

D1FR  = MU_2                   + ETA(2)
FREL  = FRELCOVTIME * EXP(MU_3 + ETA(3))
CL    = EXP(MU_4               + ETA(4))
V     = EXP(MU_5               + ETA(5))
MAT   = MATCOVTIME * EXP(MU_6  + ETA(6))
D1    = MAT*(1-D1FR)

F1    = FREL
KA    = 1 / (MAT-D1)
S2    = V

$ERROR
CP    = A(2)*1000 / V
IPRED = LOG(CP + 0.00001)
Y     = IPRED + EPS(1) * EXP(ETA(1))

$THETA  1 FIX ; 1. TVFREL
$THETA  (0,7.03728) ; 2. TVCL
$THETA  (0,133.898) ; 3. TVV
$THETA  (0,2.08608) ; 4. TVMAT
$THETA  (0,0.681472) ; 5. D1
$THETA  (-1.00,0.107997,3.00) ; 6. FRELFOOD1
$THETA  (-1.00,-0.081275,3.00) ; 7. MATFOOD1
$OMEGA  0.0424951  ; 1. IIV on RUV
$OMEGA  0.0001  FIX  ;         D1
$OMEGA  BLOCK(4)
 0.243643  ; 2. IIV on FREL
 0.102768 0.22  ; 3. IIV on CL
 0.122407 0.106783 0.38  ; 4. IIV on V
 0.0025675 0.0160454 0.0551753 0.149201  ; 5. IIV on MAT
$SIGMA  0.0324511  ;     1. RUV
$ESTIMATION METHOD=IMPMAP AUTO=1 RANMETHOD=3P INTER NOABORT PRINT=1
            CITER=15 NOCOV=1 ISAMPEND=100 NITER=50 ISAMPLE=300 CTYPE=1
            CALPHA=0.001
$ESTIMATION METHOD=IMPMAP INTER EONLY=1 NITER=5 ISAMPLE=1000 NOCOV=0
$COVARIANCE PRINT=E MATRIX=S UNCONDITIONAL
$TABLE      NO ID STUDYID TAD TIME DAY AMT RATE ODV DV EVID BLQ DOSE
            FOOD FORM TYPE WT HT LBWT BSA SEX RACE AGE AST ALT BILI
            CRCL BMI NCI GENO ETHNIC SMOK RACEL GENOL NCIL CPRED
            CIPREDI CWRES CIWRES ETAS(1:LAST) NOPRINT ONEHEADER
            FILE=xptab3

NM-TRAN MESSAGES
 WARNINGS AND ERRORS (IF ANY) FOR PROBLEM    1
 (WARNING  2) NM-TRAN INFERS THAT THE DATA ARE POPULATION.

1NONLINEAR MIXED EFFECTS MODEL PROGRAM (NONMEM) VERSION 7.4.4
 ORIGINALLY DEVELOPED BY STUART BEAL, LEWIS SHEINER, AND ALISON BOECKMANN
 CURRENT DEVELOPERS ARE ROBERT BAUER, ICON DEVELOPMENT SOLUTIONS,
 AND ALISON BOECKMANN. IMPLEMENTATION, EFFICIENCY, AND STANDARDIZATION
 PERFORMED BY NOUS INFOSYSTEMS.
 PROBLEM NO.:         1
 run 1
 TOT. NO. OF OBS RECS:     6222
 TOT. NO. OF INDIVIDUALS:      760
 ONE COMPARTMENT MODEL WITH FIRST-ORDER ABSORPTION (ADVAN2)
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 #TBLN:      1
 #METH: Importance Sampling assisted by MAP Estimation (No Prior)
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
 #TERM:
 OPTIMIZATION WAS COMPLETED

 ETABAR IS THE ARITHMETIC MEAN OF THE ETA-ESTIMATES,
 AND THE P-VALUE IS GIVEN FOR THE NULL HYPOTHESIS THAT THE TRUE MEAN IS 0.

 ETABAR:        -2.1246E-03 -3.4161E-05 -1.0671E-03 -7.8725E-04 -2.2294E-03  1.5390E-03
 SE:             8.5688E-03  4.1517E-05  1.5448E-02  1.1595E-02  2.0484E-02  9.2172E-03
 N:                     730         730         730         730         730         730

 P VAL.:         8.0417E-01  4.1062E-01  9.4493E-01  9.4587E-01  9.1334E-01  8.6740E-01

 ETASHRINKSD(%)  3.1807E+01  8.8775E+01  2.9501E+01  3.9214E+01  2.2193E+01  3.6947E+01
 ETASHRINKVR(%)  5.3497E+01  9.8740E+01  5.0299E+01  6.3050E+01  3.9460E+01  6.0244E+01
 EBVSHRINKSD(%)  3.1199E+01  9.1688E+01  2.9722E+01  3.9387E+01  2.2622E+01  3.6751E+01
 EBVSHRINKVR(%)  5.2664E+01  9.9309E+01  5.0610E+01  6.3261E+01  4.0126E+01  5.9996E+01
 EPSSHRINKSD(%)  1.6210E+01
 EPSSHRINKVR(%)  2.9792E+01


 TOTAL DATA POINTS NORMALLY DISTRIBUTED (N):         6222
 N*LOG(2PI) CONSTANT TO OBJECTIVE FUNCTION:    11435.271107198947
 OBJECTIVE FUNCTION VALUE WITHOUT CONSTANT:   -7763.9618163858004
 OBJECTIVE FUNCTION VALUE WITH CONSTANT:       3671.3092908131466
 REPORTED OBJECTIVE FUNCTION DOES NOT CONTAIN CONSTANT

 TOTAL EFFECTIVE ETAS (NIND*NETA):                          4380


 #TERE:
 Elapsed estimation  time in seconds:    78.36

 ********************            IMPORTANCE SAMPLING ASSISTED BY MAP ESTIMATION (NO PRIOR)           ********************
 #OBJT:**************                        FINAL VALUE OF OBJECTIVE FUNCTION                       ********************
 #OBJV:********************************************    -7763.962       **************************************************

 ********************            IMPORTANCE SAMPLING ASSISTED BY MAP ESTIMATION (NO PRIOR)           ********************
 ********************                             FINAL PARAMETER ESTIMATE                           ********************

 THETA - VECTOR OF FIXED EFFECTS PARAMETERS   *********
         TH 1      TH 2      TH 3      TH 4      TH 5      TH 6      TH 7
         1.00E+00  7.64E+00  1.48E+02  2.09E+00  6.81E-01 -7.69E-02  1.21E-01

 OMEGA - COV MATRIX FOR RANDOM EFFECTS - ETAS  ********
         ETA1      ETA2      ETA3      ETA4      ETA5      ETA6
 ETA1
+        1.15E-01
 ETA2
+        0.00E+00  1.00E-04
 ETA3
+        0.00E+00  0.00E+00  3.51E-01
 ETA4
+        0.00E+00  0.00E+00  6.22E-02  2.66E-01
 ETA5
+        0.00E+00  0.00E+00  1.01E-01  8.67E-02  5.07E-01
 ETA6
+        0.00E+00  0.00E+00  2.83E-02  1.35E-04  4.68E-02  1.56E-01

 SIGMA - COV MATRIX FOR RANDOM EFFECTS - EPSILONS  ****
         EPS1
 EPS1
+        3.21E-02

 OMEGA - CORR MATRIX FOR RANDOM EFFECTS - ETAS  *******
         ETA1      ETA2      ETA3      ETA4      ETA5      ETA6
 ETA1
+        3.40E-01
 ETA2
+        0.00E+00  1.00E-02
 ETA3
+        0.00E+00  0.00E+00  5.92E-01
 ETA4
+        0.00E+00  0.00E+00  2.04E-01  5.16E-01
 ETA5
+        0.00E+00  0.00E+00  2.40E-01  2.36E-01  7.12E-01
 ETA6
+        0.00E+00  0.00E+00  1.21E-01  6.61E-04  1.66E-01  3.95E-01

 SIGMA - CORR MATRIX FOR RANDOM EFFECTS - EPSILONS  ***
         EPS1
 EPS1
+        1.79E-01
 #TBLN:      2
 #METH: Objective Function Evaluation by Importance/MAP Sampling (No Prior)
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
 #TERM:
 EXPECTATION ONLY PROCESS COMPLETED

 ETABAR IS THE ARITHMETIC MEAN OF THE ETA-ESTIMATES,
 AND THE P-VALUE IS GIVEN FOR THE NULL HYPOTHESIS THAT THE TRUE MEAN IS 0.

 ETABAR:        -1.8472E-03 -1.6657E-05  2.1489E-03  1.7273E-03  1.8301E-04  8.2186E-04
 SE:             8.5227E-03  3.1358E-05  1.5429E-02  1.1536E-02  2.0443E-02  9.1977E-03
 N:                     730         730         730         730         730         730

 P VAL.:         8.2841E-01  5.9529E-01  8.8923E-01  8.8098E-01  9.9286E-01  9.2880E-01

 ETASHRINKSD(%)  3.2173E+01  9.1522E+01  2.9590E+01  3.9525E+01  2.2351E+01  3.7081E+01
 ETASHRINKVR(%)  5.3995E+01  9.9281E+01  5.0425E+01  6.3428E+01  3.9707E+01  6.0412E+01
 EBVSHRINKSD(%)  3.1655E+01  9.2970E+01  2.9634E+01  3.9439E+01  2.2491E+01  3.7542E+01
 EBVSHRINKVR(%)  5.3290E+01  9.9506E+01  5.0486E+01  6.3324E+01  3.9923E+01  6.0990E+01
 EPSSHRINKSD(%)  1.6448E+01
 EPSSHRINKVR(%)  3.0190E+01


 TOTAL DATA POINTS NORMALLY DISTRIBUTED (N):         6222
 N*LOG(2PI) CONSTANT TO OBJECTIVE FUNCTION:    11435.271107198947
 OBJECTIVE FUNCTION VALUE WITHOUT CONSTANT:   -7761.7627611190428
 OBJECTIVE FUNCTION VALUE WITH CONSTANT:       3673.5083460799042
 REPORTED OBJECTIVE FUNCTION DOES NOT CONTAIN CONSTANT

 TOTAL EFFECTIVE ETAS (NIND*NETA):                          4380


 #TERE:
 Elapsed estimation  time in seconds:    25.51
 Elapsed covariance  time in seconds:     0.19

 ********************       OBJECTIVE FUNCTION EVALUATION BY IMPORTANCE/MAP SAMPLING (NO PRIOR)      ********************
 #OBJT:**************                        FINAL VALUE OF OBJECTIVE FUNCTION                       ********************
 #OBJV:********************************************    -7761.763       **************************************************

 ********************       OBJECTIVE FUNCTION EVALUATION BY IMPORTANCE/MAP SAMPLING (NO PRIOR)      ********************
 ********************                             FINAL PARAMETER ESTIMATE                           ********************

 THETA - VECTOR OF FIXED EFFECTS PARAMETERS   *********
         TH 1      TH 2      TH 3      TH 4      TH 5      TH 6      TH 7
         1.00E+00  7.64E+00  1.48E+02  2.09E+00  6.81E-01 -7.69E-02  1.21E-01

 OMEGA - COV MATRIX FOR RANDOM EFFECTS - ETAS  ********
         ETA1      ETA2      ETA3      ETA4      ETA5      ETA6
 ETA1
+        1.15E-01
 ETA2
+        0.00E+00  1.00E-04
 ETA3
+        0.00E+00  0.00E+00  3.51E-01
 ETA4
+        0.00E+00  0.00E+00  6.22E-02  2.66E-01
 ETA5
+        0.00E+00  0.00E+00  1.01E-01  8.67E-02  5.07E-01
 ETA6
+        0.00E+00  0.00E+00  2.83E-02  1.35E-04  4.68E-02  1.56E-01

 SIGMA - COV MATRIX FOR RANDOM EFFECTS - EPSILONS  ****
         EPS1
 EPS1
+        3.21E-02

 OMEGA - CORR MATRIX FOR RANDOM EFFECTS - ETAS  *******
         ETA1      ETA2      ETA3      ETA4      ETA5      ETA6
 ETA1
+        3.40E-01
 ETA2
+        0.00E+00  1.00E-02
 ETA3
+        0.00E+00  0.00E+00  5.92E-01
 ETA4
+        0.00E+00  0.00E+00  2.04E-01  5.16E-01
 ETA5
+        0.00E+00  0.00E+00  2.40E-01  2.36E-01  7.12E-01
 ETA6
+        0.00E+00  0.00E+00  1.21E-01  6.61E-04  1.66E-01  3.95E-01

 SIGMA - CORR MATRIX FOR RANDOM EFFECTS - EPSILONS  ***
         EPS1
 EPS1
+        1.79E-01

 ********************       OBJECTIVE FUNCTION EVALUATION BY IMPORTANCE/MAP SAMPLING (NO PRIOR)      ********************
 ********************                          STANDARD ERROR OF ESTIMATE (S)                        ********************

 THETA - VECTOR OF FIXED EFFECTS PARAMETERS   *********
         TH 1      TH 2      TH 3      TH 4      TH 5      TH 6      TH 7
         0.00E+00  2.17E-01  5.18E+00  6.74E-02  4.83E-03  1.95E-02  1.91E-02

 OMEGA - COV MATRIX FOR RANDOM EFFECTS - ETAS  ********
         ETA1      ETA2      ETA3      ETA4      ETA5      ETA6
 ETA1
+        1.25E-02
 ETA2
+        0.00E+00  0.00E+00
 ETA3
+        0.00E+00  0.00E+00  3.67E-01
 ETA4
+        0.00E+00  0.00E+00  2.54E-01  3.32E-01
 ETA5
+        0.00E+00  0.00E+00  3.13E-01  3.07E-01  4.70E-01
 ETA6
+        0.00E+00  0.00E+00  1.56E-01  1.56E-01  1.56E-01  1.75E-02

 SIGMA - COV MATRIX FOR RANDOM EFFECTS - EPSILONS  ****
         EPS1
 EPS1
+        1.25E-03

 OMEGA - CORR MATRIX FOR RANDOM EFFECTS - ETAS  *******
         ETA1      ETA2      ETA3      ETA4      ETA5      ETA6
 ETA1
+        1.84E-02
 ETA2
+       ......... .........
 ETA3
+       ......... .........  3.10E-01
 ETA4
+       ......... .........  6.64E-01  3.22E-01
 ETA5
+       ......... .........  5.70E-01  6.50E-01  3.30E-01
 ETA6
+       ......... .........  6.62E-01  7.63E-01  5.52E-01  2.21E-02

 SIGMA - CORR MATRIX FOR RANDOM EFFECTS - EPSILONS  ***
         EPS1
 EPS1
+        3.50E-03
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
 ********************       OBJECTIVE FUNCTION EVALUATION BY IMPORTANCE/MAP SAMPLING (NO PRIOR)      ********************
 ********************                    EIGENVALUES OF COR MATRIX OF ESTIMATE (S)                   ********************

             1         2         3         4         5         6         7         8         9        10        11        12
             13        14        15        16        17        18
         1.30E-03  1.74E-03  2.29E-03  5.30E-03  9.65E-03  2.98E-01  4.42E-01  6.88E-01  7.32E-01  8.89E-01  9.85E-01  1.15E+00
          1.29E+00  1.38E+00  1.43E+00  2.28E+00  2.71E+00  3.72E+00
 Elapsed postprocess time in seconds:     6.29
 Elapsed finaloutput time in seconds:     2.41
 #CPUT: Total CPU Time in Seconds,      754.339
