Wed Nov 23 12:57:43 CET 2022
;; 1. Based on: 25
;; 2. Description:
;;    New simulated data set
;; 3. Label:
;;    SimVal base model
;------------------------------------------------------------------------------
$PROBLEM    run 1
$INPUT      NO ID STUDYID TAD TIME DAY AMT RATE ODV DV EVID BLQ DOSE
            FOOD FORM TYPE WT HT LBWT BSA SEX RACE AGE AST ALT BILI
            CRCL BMI NCI GENO2 ETHNIC SMOK RACEL NCIL
$DATA      DAT-2-MI-PMX-2-onlyTYPE2-new.csv IGNORE=@ IGNORE(BLQ.EQN.1)
$SUBROUTINE ADVAN2 TRANS2
$PK
;;; MATFOOD-DEFINITION START
IF(FOOD.EQ.1) MATFOOD = 1  ; Most common
IF(FOOD.EQ.0) MATFOOD = ( 1 + THETA(6))
;;; MATFOOD-DEFINITION END

;;; MAT-RELATION START
MATCOVTIME = MATFOOD
;;; MAT-RELATION END

;;; FRELFOOD-DEFINITION START
IF(FOOD.EQ.1) FRELFOOD = 1  ; Most common
IF(FOOD.EQ.0) FRELFOOD = ( 1 + THETA(7))
;;; FRELFOOD-DEFINITION END

;;; FREL-RELATION START
FRELCOVTIME = FRELFOOD
;;; FREL-RELATION END

TVFREL  = THETA(1)
TVCL    = THETA(2)
TVV     = THETA(3)
TVMAT   = THETA(4)
TVD1    = THETA(5)

;MU_1  = LOG(TVRUV)
MU_2  = TVD1
MU_3  = LOG(TVCL)
MU_4  = LOG(TVV)
MU_5  = LOG(TVMAT)

D1FR  = MU_2                   + ETA(2)
FREL  = TVFREL*FRELCOVTIME
CL    = EXP(MU_3               + ETA(3))
V     = EXP(MU_4               + ETA(4))
MAT   = MATCOVTIME * EXP(MU_5  + ETA(5))
D1    = MAT*(1-D1FR)

F1    = FREL
KA    = 1 / (MAT-D1)
S2    = V

$ERROR
CP    = A(2)*1000 / V
IPRED = LOG(CP + 0.00001)
Y     = IPRED + EPS(1) * EXP(ETA(1))

$THETA  1 FIX ; 1. TVFREL
$THETA  (0,7.62228) ; 2. TVCL
$THETA  (0,147.899) ; 3. TVV
$THETA  (0,2.10108) ; 4. TVMAT
$THETA  (0,0.68089) ; 5. D1
$THETA  (-1.00,-0.0800943,3.00) ; 6. FRELFOOD1
$THETA  (-1.00,0.115625,3.00) ; 7. MATFOOD1
$OMEGA  0.116842  ; 1. IIV on RUV
$OMEGA  0.0001  FIX  ; 2. IIV on D1
$OMEGA  BLOCK(3)
 0.488192  ; 3. IIV on CL
 0.270746 0.655494  ; 4. IIV on V
 -0.025678 0.0206116 0.157579  ; 5. IIV on MAT
$SIGMA  0.0321471  ;     1. RUV
$ESTIMATION METHOD=IMPMAP AUTO=1 RANMETHOD=3P INTER NOABORT PRINT=1
            NOCOV=1 ISAMPEND=100 NITER=50 ISAMPLE=300
$ESTIMATION METHOD=IMPMAP INTER EONLY=1 NITER=50 ISAMPLE=10000 NOCOV=0
            PHITYPE=1
;$COVARIANCE PRINT=E MATRIX=S UNCONDITIONAL
$TABLE      NO ID STUDYID TAD TIME DAY AMT RATE ODV DV EVID BLQ DOSE
            FOOD FORM TYPE WT HT LBWT BSA SEX RACE AGE AST ALT BILI
            CRCL BMI NCI GENO2 ETHNIC SMOK RACE NCIL CPRED CIPREDI
            CWRES CIWRES ETAS(1:LAST) NOPRINT ONEHEADER FILE=xptab30

NM-TRAN MESSAGES
 WARNINGS AND ERRORS (IF ANY) FOR PROBLEM    1
 (WARNING  2) NM-TRAN INFERS THAT THE DATA ARE POPULATION.

1NONLINEAR MIXED EFFECTS MODEL PROGRAM (NONMEM) VERSION 7.5.0
 ORIGINALLY DEVELOPED BY STUART BEAL, LEWIS SHEINER, AND ALISON BOECKMANN
 CURRENT DEVELOPERS ARE ROBERT BAUER, ICON DEVELOPMENT SOLUTIONS,
 AND ALISON BOECKMANN. IMPLEMENTATION, EFFICIENCY, AND STANDARDIZATION
 PERFORMED BY NOUS INFOSYSTEMS.
 PROBLEM NO.:         1
 run 1
 TOT. NO. OF OBS RECS:     6335
 TOT. NO. OF INDIVIDUALS:      760
 ONE COMPARTMENT MODEL WITH FIRST-ORDER ABSORPTION (ADVAN2)
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 #TBLN:      1
 #METH: Importance Sampling assisted by MAP Estimation (No Prior)
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
 #TERM:
 OPTIMIZATION WAS NOT COMPLETED

 ETABAR IS THE ARITHMETIC MEAN OF THE ETA-ESTIMATES,
 AND THE P-VALUE IS GIVEN FOR THE NULL HYPOTHESIS THAT THE TRUE MEAN IS 0.

 ETABAR:         7.2101E-05 -7.3480E-05 -1.8124E-04 -4.1650E-04  5.5467E-05
 SE:             4.9372E-03  3.3009E-05  1.5502E-02  1.5216E-02  5.0547E-03
 N:                     730         730         730         730         730

 P VAL.:         9.8835E-01  2.6008E-02  9.9067E-01  9.7816E-01  9.9124E-01

 ETASHRINKSD(%)  4.3052E+01  9.1075E+01  2.0529E+00  8.1345E+00  3.6973E+01
 ETASHRINKVR(%)  6.7569E+01  9.9204E+01  4.0637E+00  1.5607E+01  6.0276E+01
 EBVSHRINKSD(%)  4.2588E+01  9.2354E+01  2.0736E+00  8.0831E+00  3.7101E+01
 EBVSHRINKVR(%)  6.7039E+01  9.9415E+01  4.1041E+00  1.5513E+01  6.0437E+01
 RELATIVEINF(%)  3.2953E+01  5.5595E-01  1.0000E+02  6.0707E+01  2.7137E+01
 EPSSHRINKSD(%)  1.4441E+01
 EPSSHRINKVR(%)  2.6797E+01


 TOTAL DATA POINTS NORMALLY DISTRIBUTED (N):         6335
 N*LOG(2PI) CONSTANT TO OBJECTIVE FUNCTION:    11642.951215703202
 OBJECTIVE FUNCTION VALUE WITHOUT CONSTANT:   -10449.649990224812
 OBJECTIVE FUNCTION VALUE WITH CONSTANT:       1193.3012254783898
 REPORTED OBJECTIVE FUNCTION DOES NOT CONTAIN CONSTANT

 TOTAL EFFECTIVE ETAS (NIND*NETA):                          3650


 #TERE:
 Elapsed estimation  time in seconds:   111.98

 ********************            IMPORTANCE SAMPLING ASSISTED BY MAP ESTIMATION (NO PRIOR)           ********************
 #OBJT:**************                        FINAL VALUE OF OBJECTIVE FUNCTION                       ********************
 #OBJV:********************************************   -10449.650       **************************************************

 ********************            IMPORTANCE SAMPLING ASSISTED BY MAP ESTIMATION (NO PRIOR)           ********************
 ********************                             FINAL PARAMETER ESTIMATE                           ********************

 THETA - VECTOR OF FIXED EFFECTS PARAMETERS   *********
         TH 1      TH 2      TH 3      TH 4      TH 5      TH 6      TH 7
         1.00E+00  6.17E+00  1.21E+02  1.92E+00  6.77E-01 -5.21E-02  1.53E-01

 OMEGA - COV MATRIX FOR RANDOM EFFECTS - ETAS  ********
         ETA1      ETA2      ETA3      ETA4      ETA5
 ETA1
+        5.49E-02
 ETA2
+        0.00E+00  1.00E-04
 ETA3
+        0.00E+00  0.00E+00  1.83E-01
 ETA4
+        0.00E+00  0.00E+00  1.41E-01  2.01E-01
 ETA5
+        0.00E+00  0.00E+00  1.24E-02  2.59E-02  4.70E-02

 SIGMA - COV MATRIX FOR RANDOM EFFECTS - EPSILONS  ****
         EPS1
 EPS1
+        3.10E-02

 OMEGA - CORR MATRIX FOR RANDOM EFFECTS - ETAS  *******
         ETA1      ETA2      ETA3      ETA4      ETA5
 ETA1
+        2.34E-01
 ETA2
+        0.00E+00  1.00E-02
 ETA3
+        0.00E+00  0.00E+00  4.28E-01
 ETA4
+        0.00E+00  0.00E+00  7.34E-01  4.48E-01
 ETA5
+        0.00E+00  0.00E+00  1.34E-01  2.66E-01  2.17E-01

 SIGMA - CORR MATRIX FOR RANDOM EFFECTS - EPSILONS  ***
         EPS1
 EPS1
+        1.76E-01
 #TBLN:      2
 #METH: Objective Function Evaluation by Importance/MAP Sampling (No Prior)
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
 #TERM:
 EXPECTATION ONLY PROCESS WAS COMPLETED

 ETABAR IS THE ARITHMETIC MEAN OF THE ETA-ESTIMATES,
 AND THE P-VALUE IS GIVEN FOR THE NULL HYPOTHESIS THAT THE TRUE MEAN IS 0.

 ETABAR:        -2.8918E-04 -7.2750E-05 -1.2753E-04 -5.5283E-04 -2.4885E-04
 SE:             4.9383E-03  2.2698E-05  1.5494E-02  1.5216E-02  5.0233E-03
 N:                     730         730         730         730         730

 P VAL.:         9.5330E-01  1.3500E-03  9.9343E-01  9.7102E-01  9.6049E-01

 ETASHRINKSD(%)  4.3039E+01  9.3863E+01  2.1029E+00  8.1331E+00  3.7364E+01
 ETASHRINKVR(%)  6.7554E+01  9.9623E+01  4.1616E+00  1.5605E+01  6.0768E+01
 EBVSHRINKSD(%)  4.3112E+01  9.5609E+01  2.0820E+00  8.0724E+00  3.7347E+01
 EBVSHRINKVR(%)  6.7637E+01  9.9807E+01  4.1206E+00  1.5493E+01  6.0746E+01
 RELATIVEINF(%)  3.2293E+01  1.6716E-01  1.0000E+02  5.6642E+01  2.5003E+01
 EPSSHRINKSD(%)  1.4583E+01
 EPSSHRINKVR(%)  2.7040E+01


 TOTAL DATA POINTS NORMALLY DISTRIBUTED (N):         6335
 N*LOG(2PI) CONSTANT TO OBJECTIVE FUNCTION:    11642.951215703202
 OBJECTIVE FUNCTION VALUE WITHOUT CONSTANT:   -10450.493827175251
 OBJECTIVE FUNCTION VALUE WITH CONSTANT:       1192.4573885279515
 REPORTED OBJECTIVE FUNCTION DOES NOT CONTAIN CONSTANT

 TOTAL EFFECTIVE ETAS (NIND*NETA):                          3650


 #TERE:
 Elapsed estimation  time in seconds:   235.17

 ********************       OBJECTIVE FUNCTION EVALUATION BY IMPORTANCE/MAP SAMPLING (NO PRIOR)      ********************
 #OBJT:**************                        FINAL VALUE OF OBJECTIVE FUNCTION                       ********************
 #OBJV:********************************************   -10450.494       **************************************************

 ********************       OBJECTIVE FUNCTION EVALUATION BY IMPORTANCE/MAP SAMPLING (NO PRIOR)      ********************
 ********************                             FINAL PARAMETER ESTIMATE                           ********************

 THETA - VECTOR OF FIXED EFFECTS PARAMETERS   *********
         TH 1      TH 2      TH 3      TH 4      TH 5      TH 6      TH 7
         1.00E+00  6.17E+00  1.21E+02  1.92E+00  6.77E-01 -5.21E-02  1.53E-01

 OMEGA - COV MATRIX FOR RANDOM EFFECTS - ETAS  ********
         ETA1      ETA2      ETA3      ETA4      ETA5
 ETA1
+        5.49E-02
 ETA2
+        0.00E+00  1.00E-04
 ETA3
+        0.00E+00  0.00E+00  1.83E-01
 ETA4
+        0.00E+00  0.00E+00  1.41E-01  2.01E-01
 ETA5
+        0.00E+00  0.00E+00  1.24E-02  2.59E-02  4.70E-02

 SIGMA - COV MATRIX FOR RANDOM EFFECTS - EPSILONS  ****
         EPS1
 EPS1
+        3.10E-02

 OMEGA - CORR MATRIX FOR RANDOM EFFECTS - ETAS  *******
         ETA1      ETA2      ETA3      ETA4      ETA5
 ETA1
+        2.34E-01
 ETA2
+        0.00E+00  1.00E-02
 ETA3
+        0.00E+00  0.00E+00  4.28E-01
 ETA4
+        0.00E+00  0.00E+00  7.34E-01  4.48E-01
 ETA5
+        0.00E+00  0.00E+00  1.34E-01  2.66E-01  2.17E-01

 SIGMA - CORR MATRIX FOR RANDOM EFFECTS - EPSILONS  ***
         EPS1
 EPS1
+        1.76E-01
 Elapsed postprocess time in seconds:     5.46
 Elapsed finaloutput time in seconds:     2.50
 #CPUT: Total CPU Time in Seconds,     3910.992
