Wed May 13 10:54:59 CEST 2026
;; 1. Based on: 25
;; 2. Description:
;;    New simulated data set
;; 3. Label:
;;    SimVal base model
;------------------------------------------------------------------------------
$PROBLEM    FFEM model
$INPUT      NO ID STUDYID TAD TIME DAY AMT RATE ODV DV EVID BLQ DOSE
            FOOD FORM TYPE WT HT LBWT BSA SEX RACE AGE AST ALT BILI
            CRCL BMI NCI GENO2 ETHNIC SMOK RACEL NCIL CLFREMCOV
            VFREMCOV MATFREMCOV
$DATA      ffemData31.csv IGNORE=@ IGNORE(BLQ.EQN.1)
$SUBROUTINE ADVAN2 TRANS2
$PK
;;; MATFOOD-DEFINITION START
IF(FOOD.EQ.1) MATFOOD = 1  ; Most common
IF(FOOD.EQ.0) MATFOOD = ( 1 + THETA(6))
;;; MATFOOD-DEFINITION END

;;; MAT-RELATION START
MATCOVTIME = MATFOOD
;;; MAT-RELATION END

;;; FRELFOOD-DEFINITION START
IF(FOOD.EQ.1) FRELFOOD = 1  ; Most common
IF(FOOD.EQ.0) FRELFOOD = ( 1 + THETA(7))
;;; FRELFOOD-DEFINITION END

;;; FREL-RELATION START
FRELCOVTIME = FRELFOOD
;;; FREL-RELATION END

TVFREL  = THETA(1)
TVCL    = THETA(2)
TVV     = THETA(3)
TVMAT   = THETA(4)
TVD1    = THETA(5)

;MU_1  = LOG(TVRUV)
MU_2  = TVD1
MU_3  = LOG(TVCL)
MU_4  = LOG(TVV)
MU_5  = LOG(TVMAT)

D1FR  = MU_2                   + ETA(2)
FREL  = TVFREL*FRELCOVTIME
CL    = EXP(MU_3               + (ETA(3)+CLFREMCOV))
V     = EXP(MU_4               + (ETA(4)+VFREMCOV))
MAT   = MATCOVTIME * EXP(MU_5  + (ETA(5)+MATFREMCOV))
D1    = MAT*(1-D1FR)

F1    = FREL
KA    = 1 / (MAT-D1)
S2    = V

$ERROR
CP    = A(2)*1000 / V
IPRED = LOG(CP + 0.00001)
Y     = IPRED + EPS(1) * EXP(ETA(1))

$THETA  1 ; TH1
$THETA  6.14514 ; TH2
$THETA  122.525 ; TH3
$THETA  1.88694 ; TH4
$THETA  0.670374 ; TH5
$THETA  -0.0522225 ; TH6
$THETA  0.121132 ; TH7
$OMEGA  BLOCK(1)
 0.0541999
$OMEGA  BLOCK(1)
 1E-04
$OMEGA  BLOCK(3)
 0.0651828248769568
 0.0196835622235299 0.0520730858933393
 0.00522660172002042 0.0239687695234169 0.0425248026969258
$SIGMA  BLOCK(1)
 0.0309911
$ESTIMATION METHOD=1 INTER MAX=1 ETASTYPE=0

NM-TRAN MESSAGES
 WARNINGS AND ERRORS (IF ANY) FOR PROBLEM    1
 (WARNING  2) NM-TRAN INFERS THAT THE DATA ARE POPULATION.
Note: Analytical 2nd Derivatives are constructed in FSUBS but are never used.
      You may insert $ABBR DERIV2=NO after the first $PROB to save FSUBS construction and compilation time

1NONLINEAR MIXED EFFECTS MODEL PROGRAM (NONMEM) VERSION 7.5.1
 ORIGINALLY DEVELOPED BY STUART BEAL, LEWIS SHEINER, AND ALISON BOECKMANN
 CURRENT DEVELOPERS ARE ROBERT BAUER, ICON DEVELOPMENT SOLUTIONS,
 AND ALISON BOECKMANN. IMPLEMENTATION, EFFICIENCY, AND STANDARDIZATION
 PERFORMED BY NOUS INFOSYSTEMS.
 PROBLEM NO.:         1
 FFEM model
 TOT. NO. OF OBS RECS:     6335
 TOT. NO. OF INDIVIDUALS:      760
 ONE COMPARTMENT MODEL WITH FIRST-ORDER ABSORPTION (ADVAN2)
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 #TBLN:      1
 #METH: First Order Conditional Estimation with Interaction
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
 #TERM:
0MINIMIZATION TERMINATED
 DUE TO MAX. NO. OF FUNCTION EVALUATIONS EXCEEDED
 NO. OF FUNCTION EVALUATIONS USED:       10
 NO. OF SIG. DIGITS UNREPORTABLE

 ETABAR IS THE ARITHMETIC MEAN OF THE ETA-ESTIMATES,
 AND THE P-VALUE IS GIVEN FOR THE NULL HYPOTHESIS THAT THE TRUE MEAN IS 0.

 ETABAR:        -6.8655E-02 -8.4885E-05 -3.3176E-04 -7.9527E-03  1.3173E-03
 SE:             5.3893E-03  2.5165E-05  1.0625E-02  8.2374E-03  5.7341E-03
 N:                     730         730         730         730         730

 P VAL.:         3.7083E-37  7.4328E-04  9.7509E-01  3.3432E-01  8.1830E-01

 ETASHRINKSD(%)  3.7455E+01  9.3201E+01  1.0000E-10  2.4688E+00  2.4872E+01
 ETASHRINKVR(%)  6.0881E+01  9.9538E+01  1.0000E-10  4.8766E+00  4.3557E+01
 EBVSHRINKSD(%)  3.4286E+01  9.4794E+01  3.6533E+00  1.6688E+01  2.8588E+01
 EBVSHRINKVR(%)  5.6816E+01  9.9729E+01  7.1731E+00  3.0591E+01  4.9003E+01
 RELATIVEINF(%)  4.3184E+01  2.2451E-01  9.8692E+01  4.0197E+01  2.4253E+01
 EPSSHRINKSD(%)  7.5860E+00
 EPSSHRINKVR(%)  1.4596E+01


 TOTAL DATA POINTS NORMALLY DISTRIBUTED (N):         6335
 N*LOG(2PI) CONSTANT TO OBJECTIVE FUNCTION:    11642.951215703202
 OBJECTIVE FUNCTION VALUE WITHOUT CONSTANT:   -10839.901556778983
 OBJECTIVE FUNCTION VALUE WITH CONSTANT:       803.04965892421933
 REPORTED OBJECTIVE FUNCTION DOES NOT CONTAIN CONSTANT

 TOTAL EFFECTIVE ETAS (NIND*NETA):                          3650


 #TERE:
 Elapsed estimation  time in seconds:     2.71
 Elapsed postprocess time in seconds:     0.00

 ********************               FIRST ORDER CONDITIONAL ESTIMATION WITH INTERACTION              ********************
 #OBJT:**************                       MINIMUM VALUE OF OBJECTIVE FUNCTION                      ********************
 #OBJV:********************************************   -10839.902       **************************************************

 ********************               FIRST ORDER CONDITIONAL ESTIMATION WITH INTERACTION              ********************
 ********************                             FINAL PARAMETER ESTIMATE                           ********************

 THETA - VECTOR OF FIXED EFFECTS PARAMETERS   *********
         TH 1      TH 2      TH 3      TH 4      TH 5      TH 6      TH 7
         1.00E+00  6.15E+00  1.23E+02  1.89E+00  6.70E-01 -5.22E-02  1.21E-01

 OMEGA - COV MATRIX FOR RANDOM EFFECTS - ETAS  ********
         ETA1      ETA2      ETA3      ETA4      ETA5
 ETA1
+        5.42E-02
 ETA2
+        0.00E+00  1.00E-04
 ETA3
+        0.00E+00  0.00E+00  6.52E-02
 ETA4
+        0.00E+00  0.00E+00  1.97E-02  5.21E-02
 ETA5
+        0.00E+00  0.00E+00  5.23E-03  2.40E-02  4.25E-02

 SIGMA - COV MATRIX FOR RANDOM EFFECTS - EPSILONS  ****
         EPS1
 EPS1
+        3.10E-02

 OMEGA - CORR MATRIX FOR RANDOM EFFECTS - ETAS  *******
         ETA1      ETA2      ETA3      ETA4      ETA5
 ETA1
+        2.33E-01
 ETA2
+        0.00E+00  1.00E-02
 ETA3
+        0.00E+00  0.00E+00  2.55E-01
 ETA4
+        0.00E+00  0.00E+00  3.38E-01  2.28E-01
 ETA5
+        0.00E+00  0.00E+00  9.93E-02  5.09E-01  2.06E-01

 SIGMA - CORR MATRIX FOR RANDOM EFFECTS - EPSILONS  ***
         EPS1
 EPS1
+        1.76E-01
 Elapsed finaloutput time in seconds:     0.00
 #CPUT: Total CPU Time in Seconds,        7.761
