Tue Jun 18 17:23:54 CEST 2024
;; 1. Based on: 4
;; 2. Description:
;;    Adding genotype on CL as a mechanistic covariate
;; 3. Label:
;;    SimVal base model
;------------------------------------------------------------------------------
$PROBLEM    run 5
$INPUT      REF ROWNR ID STUDYIDN TSFDH TIME TSFDNH TSLDH DAY TYPE
            EVID ODV DV LLOQ BLQ AMT RATE DOSEVN DOSENN TRTN FORMN
            FOODDN SEXN RACEN RACELN RACEL1N RACEL2N RACEL3N ETHNICHN
            HTCMBL AGEYBL WTKGBL BMIBL GENON GENO1N GENO2N GENO3N
            GENO4N SMOK ALTBL ASTBL BILIBL CRCLBL NCIN NCI0N NCI1N
            NCI2N NCILN ADTM=DROP DATETIME=DROP USUBJID=DROP
$DATA      DAT-1b-PMX-REP-PMX-2.csv IGNORE=@ IGNORE(TRTN.EQN.2)
            IGNORE(BLQ.EQN.1) IGNORE=(ID.EQN.895)
$SUBROUTINE ADVAN2 TRANS2
$PK
TVFREL  = THETA(1)

CLWT    =  (WTKGBL/75)**THETA(2)
CLGENO1 = 1
CLGENO2 = 1
CLGENO3 = 1
CLGENO4 = 1
IF(GENO1N.EQ.1) CLGENO1 = (1+THETA(8))
IF(GENO3N.EQ.1) CLGENO3 = (1+THETA(9))
IF(GENO4N.EQ.1) CLGENO4 = (1+THETA(10))

CLCOV1 = CLWT*CLGENO1*CLGENO2*CLGENO3*CLGENO4

VWT   = (WTKGBL/75)**THETA(3)
VCOV1  = VWT

TVCL    = THETA(4) * CLCOV1
TVV     = THETA(5) * VCOV1
TVMAT   = THETA(6)
TVD1    = THETA(7)

FREL  = TVFREL  * EXP(ETA(2))
CL    = TVCL    * EXP(ETA(3))
V     = TVV     * EXP(ETA(4))
MAT   = TVMAT   * EXP(ETA(5))
D1    = MAT*(1-TVD1)

F1    = FREL
KA    = 1 / (MAT-D1)
S2    = V

$ERROR
CP    = A(2)*1000 / V
IPRED = LOG(CP + 0.00001)
Y     = IPRED + EPS(1) * EXP(ETA(1))

$THETA  1 FIX ; 1. TVFREL
$THETA  0.75 FIX ; 2. WTKGBL coef on TVCL
$THETA  1 FIX ; 3. WTKGBL coef on TVV
$THETA  (0,12.9322) ; 4. TVCL
$THETA  (0,194.517) ; 5. TVV
$THETA  (0,6.60379) ; 6. TVMAT
$THETA  (0,0.620387,1) ; 7 TVD1
$THETA  (-1,0.01) ; GENO1N=1 on CL
$THETA  (-1,0.01) ; GENO3N=1 on CL
$THETA  (-1,0.01) ; GENO4N=1 on CL
$OMEGA  0.0222044  ; 1. IIV on RUV
$OMEGA  0.408307  ; 2. IIV on FREL
$OMEGA  0.146483  ; 3. IIV on CL
$OMEGA  0.0850437  ; 4. IIV on V
$OMEGA  0.141458  ; 5. IIV on MAT
$SIGMA  0.0487785  ;     1. RUV
$ESTIMATION METHOD=1 INTER ETASTYPE=1 MAXEVAL=9999 PRINT=1 NOABORT
$COVARIANCE PRINT=E MATRIX=S UNCONDITIONAL
$TABLE      REF ID STUDYIDN TSFDH TIME TSFDNH TSLDH DAY TYPE EVID DV
            LLOQ BLQ AMT RATE DOSEVN DOSENN TRTN FORMN FOODDN SEXN
            RACEN ETHNICHN HTCMBL AGEYBL WTKGBL BMIBL GENON SMOK ALTBL
            ASTBL BILIBL CRCLBL GENO1N GENO2N GENO3N GENO4N NCIN NCILN
            CPRED CIPREDI CWRES CIWRES ETAS(1:LAST) NOPRINT ONEHEADER
            FILE=xptab5

NM-TRAN MESSAGES
 WARNINGS AND ERRORS (IF ANY) FOR PROBLEM    1
 (WARNING  2) NM-TRAN INFERS THAT THE DATA ARE POPULATION.

1NONLINEAR MIXED EFFECTS MODEL PROGRAM (NONMEM) VERSION 7.5.0
 ORIGINALLY DEVELOPED BY STUART BEAL, LEWIS SHEINER, AND ALISON BOECKMANN
 CURRENT DEVELOPERS ARE ROBERT BAUER, ICON DEVELOPMENT SOLUTIONS,
 AND ALISON BOECKMANN. IMPLEMENTATION, EFFICIENCY, AND STANDARDIZATION
 PERFORMED BY NOUS INFOSYSTEMS.
 PROBLEM NO.:         1
 run 5
 TOT. NO. OF OBS RECS:     6284
 TOT. NO. OF INDIVIDUALS:      754
 ONE COMPARTMENT MODEL WITH FIRST-ORDER ABSORPTION (ADVAN2)
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 #TBLN:      1
 #METH: First Order Conditional Estimation with Interaction
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
 #TERM:
0MINIMIZATION SUCCESSFUL
 NO. OF FUNCTION EVALUATIONS USED:      372
 NO. OF SIG. DIGITS IN FINAL EST.:  4.2

 ETABAR IS THE ARITHMETIC MEAN OF THE ETA-ESTIMATES,
 AND THE P-VALUE IS GIVEN FOR THE NULL HYPOTHESIS THAT THE TRUE MEAN IS 0.

 ETABAR:        -3.4759E-02  2.1425E-02  6.3956E-03 -3.7664E-02  1.4225E-03
 SE:             3.1916E-03  1.7299E-02  4.0755E-03  1.0564E-02  1.0098E-02
 N:                     744         744         744         744         744

 P VAL.:         1.3073E-27  2.1553E-01  1.1658E-01  3.6348E-04  8.8797E-01

 ETASHRINKSD(%)  4.1389E+01  1.1708E+01  5.0239E+01  3.3076E+01  2.5911E+01
 ETASHRINKVR(%)  6.5647E+01  2.2045E+01  7.5239E+01  5.5212E+01  4.5108E+01
 EBVSHRINKSD(%)  4.7587E+01  1.0823E+01  4.6828E+01  3.0544E+01  2.1864E+01
 EBVSHRINKVR(%)  7.2529E+01  2.0475E+01  7.1728E+01  5.1758E+01  3.8948E+01
 RELATIVEINF(%)  2.7471E+01  1.9422E+01  4.1966E+00  1.2603E+01  5.2613E+01
 EPSSHRINKSD(%)  9.8106E+00
 EPSSHRINKVR(%)  1.8659E+01


 TOTAL DATA POINTS NORMALLY DISTRIBUTED (N):         6385
 N*LOG(2PI) CONSTANT TO OBJECTIVE FUNCTION:    11734.845069023670
 OBJECTIVE FUNCTION VALUE WITHOUT CONSTANT:   -6702.5846636175302
 OBJECTIVE FUNCTION VALUE WITH CONSTANT:       5032.2604054061394
 REPORTED OBJECTIVE FUNCTION DOES NOT CONTAIN CONSTANT

 TOTAL EFFECTIVE ETAS (NIND*NETA):                          3720


 #TERE:
 Elapsed estimation  time in seconds:   147.20
 Elapsed covariance  time in seconds:    19.87
 Elapsed postprocess time in seconds:     2.28

 ********************               FIRST ORDER CONDITIONAL ESTIMATION WITH INTERACTION              ********************
 #OBJT:**************                       MINIMUM VALUE OF OBJECTIVE FUNCTION                      ********************
 #OBJV:********************************************    -6702.585       **************************************************

 ********************               FIRST ORDER CONDITIONAL ESTIMATION WITH INTERACTION              ********************
 ********************                             FINAL PARAMETER ESTIMATE                           ********************

 THETA - VECTOR OF FIXED EFFECTS PARAMETERS   *********
         TH 1      TH 2      TH 3      TH 4      TH 5      TH 6      TH 7      TH 8      TH 9      TH10
         1.00E+00  7.50E-01  1.00E+00  1.39E+01  1.97E+02  6.63E+00  6.16E-01  1.20E+00 -3.16E-01 -7.67E-01

 OMEGA - COV MATRIX FOR RANDOM EFFECTS - ETAS  ********
         ETA1      ETA2      ETA3      ETA4      ETA5
 ETA1
+        2.21E-02
 ETA2
+        0.00E+00  2.86E-01
 ETA3
+        0.00E+00  0.00E+00  5.00E-02
 ETA4
+        0.00E+00  0.00E+00  0.00E+00  1.86E-01
 ETA5
+        0.00E+00  0.00E+00  0.00E+00  0.00E+00  1.38E-01

 SIGMA - COV MATRIX FOR RANDOM EFFECTS - EPSILONS  ****
         EPS1
 EPS1
+        4.87E-02

 OMEGA - CORR MATRIX FOR RANDOM EFFECTS - ETAS  *******
         ETA1      ETA2      ETA3      ETA4      ETA5
 ETA1
+        1.49E-01
 ETA2
+        0.00E+00  5.35E-01
 ETA3
+        0.00E+00  0.00E+00  2.24E-01
 ETA4
+        0.00E+00  0.00E+00  0.00E+00  4.31E-01
 ETA5
+        0.00E+00  0.00E+00  0.00E+00  0.00E+00  3.72E-01

 SIGMA - CORR MATRIX FOR RANDOM EFFECTS - EPSILONS  ***
         EPS1
 EPS1
+        2.21E-01

 ********************               FIRST ORDER CONDITIONAL ESTIMATION WITH INTERACTION              ********************
 ********************                            STANDARD ERROR OF ESTIMATE                          ********************

 THETA - VECTOR OF FIXED EFFECTS PARAMETERS   *********
         TH 1      TH 2      TH 3      TH 4      TH 5      TH 6      TH 7      TH 8      TH 9      TH10
        ......... ......... .........  3.37E-01  7.84E+00  1.55E-01  8.26E-03  1.78E-01  3.99E-02  1.57E-02

 OMEGA - COV MATRIX FOR RANDOM EFFECTS - ETAS  ********
         ETA1      ETA2      ETA3      ETA4      ETA5
 ETA1
+        2.95E-03
 ETA2
+       .........  2.33E-02
 ETA3
+       ......... .........  1.55E-02
 ETA4
+       ......... ......... .........  1.87E-02
 ETA5
+       ......... ......... ......... .........  1.18E-02

 SIGMA - COV MATRIX FOR RANDOM EFFECTS - EPSILONS  ****
         EPS1
 EPS1
+        1.15E-03

 OMEGA - CORR MATRIX FOR RANDOM EFFECTS - ETAS  *******
         ETA1      ETA2      ETA3      ETA4      ETA5
 ETA1
+        9.94E-03
 ETA2
+       .........  2.17E-02
 ETA3
+       ......... .........  3.48E-02
 ETA4
+       ......... ......... .........  2.17E-02
 ETA5
+       ......... ......... ......... .........  1.59E-02

 SIGMA - CORR MATRIX FOR RANDOM EFFECTS - EPSILONS  ***
         EPS1
 EPS1
+        2.61E-03
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
 ********************               FIRST ORDER CONDITIONAL ESTIMATION WITH INTERACTION              ********************
 ********************                      EIGENVALUES OF COR MATRIX OF ESTIMATE                     ********************

             1         2         3         4         5         6         7         8         9        10        11        12
             13
         1.90E-01  3.19E-01  4.44E-01  4.91E-01  5.55E-01  7.98E-01  8.89E-01  1.01E+00  1.08E+00  1.46E+00  1.61E+00  1.86E+00
          2.30E+00
 Elapsed finaloutput time in seconds:     5.26
