Fri Oct 28 15:35:30 CEST 2022
;; 1. Based on: 7
;; 2. Description:
;;    IMPMAP and FULL BLOCK
;; 3. Label:
;;    Base model
;------------------------------------------------------------------------------
$PROBLEM    run 1
$INPUT      NO ID STUDYID TAD TIME DAY AMT RATE ODV DV EVID BLQ DOSE
            FOOD FORM TYPE WT HT AGE SEX RACE ETHNIC GENO SMOK AST ALT
            BILI BMI CRCL NCI NCIL RACEL RACEL1 RACEL2 RACEL3 GENO1
            GENO2 GENO3 GENO4
$DATA      DAT-1-MI-PMX-2.csv IGNORE=@ IGNORE(TYPE.EQN.1)
            IGNORE(BLQ.EQN.1) IGNORE(TAD.GT.100)
$SUBROUTINE ADVAN2 TRANS2
$PK
;;; MATFOOD-DEFINITION START
IF(FOOD.EQ.1.0000E+00) MATFOOD = 1  ; Most common
IF(FOOD.EQ.0.0000E+00) MATFOOD = ( 1 + THETA(9))
;;; MATFOOD-DEFINITION END

;;; MAT-RELATION START
MATCOVTIME = MATFOOD
;;; MAT-RELATION END

;;; FRELFOOD-DEFINITION START
IF(FOOD.EQ.1.0000E+00) FRELFOOD = 1  ; Most common
IF(FOOD.EQ.0.0000E+00) FRELFOOD = ( 1 + THETA(8))
;;; FRELFOOD-DEFINITION END

;;; FREL-RELATION START
FRELCOVTIME = FRELFOOD
;;; FREL-RELATION END

CLWT    = (WT/75)**THETA(1)
CLCOV   = CLWT

VWT     = (WT/75)**THETA(2)
VCOV    = VWT

TVFREL  = THETA(3)
TVCL    = THETA(4) * CLCOV
TVV     = THETA(5) * VCOV
TVMAT   = THETA(6)
TVD1    = THETA(7)

;MU_1  = LOG(TVRUV)
MU_2  = TVD1
MU_3  = LOG(TVFREL)
MU_4  = LOG(TVCL)
MU_5  = LOG(TVV)
MU_6  = LOG(TVMAT)

D1FR  = MU_2                   + ETA(2)
FREL  = FRELCOVTIME * EXP(MU_3 + ETA(3))
CL    = EXP(MU_4               + ETA(4))
V     = EXP(MU_5               + ETA(5))
MAT   = MATCOVTIME * EXP(MU_6  + ETA(6))
D1    = MAT*(1-D1FR)

F1    = FREL
KA    = 1 / (MAT-D1)
S2    = V

$ERROR
CP    = A(2)*1000 / V
IPRED = LOG(CP + 0.00001)
Y     = IPRED + EPS(1) * EXP(ETA(1))

$THETA  0.75 FIX ; 1. WT coef on TVCL
$THETA  1 FIX ; 2. WT coef on TVV
$THETA  1 FIX ; 3. TVFREL
$THETA  (0,7.03728) ; 4. TVCL
$THETA  (0,133.898) ; 5. TVV
$THETA  (0,2.08608) ; 6. TVMAT
$THETA  (0,0.681472) ; 7. D1
$THETA  (-1.00,0.107997,3.00) ; FRELFOOD1
$THETA  (-1.00,-0.081275,3.00) ; MATFOOD1
$OMEGA  0.0424951  ; 1. IIV on RUV
$OMEGA  0.0001  FIX  ;         D1
$OMEGA  BLOCK(4)
 0.243643  ; 2. IIV on FREL
 0.102768 0.22  ; 3. IIV on CL
 0.122407 0.106783 0.38  ; 4. IIV on V
 0.0025675 0.0160454 0.0551753 0.149201  ; 5. IIV on MAT
$SIGMA  0.0324511  ;     1. RUV
$ESTIMATION METHOD=IMPMAP AUTO=1 RANMETHOD=3P INTER NOABORT PRINT=1
            CITER=15 NOCOV=1 ISAMPEND=100 NITER=50 ISAMPLE=300 CTYPE=1
            CALPHA=0.001
$ESTIMATION METHOD=IMPMAP INTER EONLY=1 NITER=5 ISAMPLE=1000 NOCOV=0
$COVARIANCE PRINT=E MATRIX=S UNCONDITIONAL
$TABLE      NO ID STUDYID TAD TIME DAY AMT RATE ODV DV EVID BLQ DOSE
            FOOD FORM TYPE WT HT AGE SEX RACE ETHNIC GENO SMOK AST ALT
            BILI BMI CRCL NCI NCIL RACEL RACEL1 RACEL2 RACEL3 GENO1
            GENO2 GENO3 GENO4 CPRED CIPREDI CWRES CIWRES ETAS(1:LAST)
            NOPRINT ONEHEADER FILE=xptab8

NM-TRAN MESSAGES
 WARNINGS AND ERRORS (IF ANY) FOR PROBLEM    1
 (WARNING  2) NM-TRAN INFERS THAT THE DATA ARE POPULATION.
 (MU_WARNING 26) DATA ITEM(S) USED IN DEFINITION OF MU_(S) SHOULD BE CONSTANT FOR INDIV. REC.:
  WT

1NONLINEAR MIXED EFFECTS MODEL PROGRAM (NONMEM) VERSION 7.5.0
 ORIGINALLY DEVELOPED BY STUART BEAL, LEWIS SHEINER, AND ALISON BOECKMANN
 CURRENT DEVELOPERS ARE ROBERT BAUER, ICON DEVELOPMENT SOLUTIONS,
 AND ALISON BOECKMANN. IMPLEMENTATION, EFFICIENCY, AND STANDARDIZATION
 PERFORMED BY NOUS INFOSYSTEMS.
 PROBLEM NO.:         1
 run 1
 TOT. NO. OF OBS RECS:     6222
 TOT. NO. OF INDIVIDUALS:      760
 ONE COMPARTMENT MODEL WITH FIRST-ORDER ABSORPTION (ADVAN2)
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 #TBLN:      1
 #METH: Importance Sampling assisted by MAP Estimation (No Prior)
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
 #TERM:
 OPTIMIZATION WAS COMPLETED

 ETABAR IS THE ARITHMETIC MEAN OF THE ETA-ESTIMATES,
 AND THE P-VALUE IS GIVEN FOR THE NULL HYPOTHESIS THAT THE TRUE MEAN IS 0.

 ETABAR:        -1.7104E-03 -5.4137E-05  3.2270E-03  1.4345E-04 -2.0648E-03 -1.7412E-03
 SE:             8.5160E-03  4.0378E-05  1.4745E-02  1.1673E-02  2.0419E-02  9.2770E-03
 N:                     730         730         730         730         730         730

 P VAL.:         8.4082E-01  1.8000E-01  8.2676E-01  9.9019E-01  9.1945E-01  8.5112E-01

 ETASHRINKSD(%)  3.1754E+01  8.9083E+01  3.0735E+01  3.8589E+01  2.2382E+01  3.6422E+01
 ETASHRINKVR(%)  5.3425E+01  9.8808E+01  5.2023E+01  6.2287E+01  3.9755E+01  5.9578E+01
 EBVSHRINKSD(%)  3.1689E+01  9.3345E+01  3.0801E+01  3.8432E+01  2.2071E+01  3.6923E+01
 EBVSHRINKVR(%)  5.3336E+01  9.9557E+01  5.2115E+01  6.2094E+01  3.9270E+01  6.0213E+01
 RELATIVEINF(%)  4.5885E+01  3.8742E-01  2.2309E+00  1.6478E+00  4.1178E+00  3.1871E+01
 EPSSHRINKSD(%)  1.6234E+01
 EPSSHRINKVR(%)  2.9833E+01


 TOTAL DATA POINTS NORMALLY DISTRIBUTED (N):         6222
 N*LOG(2PI) CONSTANT TO OBJECTIVE FUNCTION:    11435.271107198947
 OBJECTIVE FUNCTION VALUE WITHOUT CONSTANT:   -7813.1322021136330
 OBJECTIVE FUNCTION VALUE WITH CONSTANT:       3622.1389050853140
 REPORTED OBJECTIVE FUNCTION DOES NOT CONTAIN CONSTANT

 TOTAL EFFECTIVE ETAS (NIND*NETA):                          4380


 #TERE:
 Elapsed estimation  time in seconds:   544.07

 ********************            IMPORTANCE SAMPLING ASSISTED BY MAP ESTIMATION (NO PRIOR)           ********************
 #OBJT:**************                        FINAL VALUE OF OBJECTIVE FUNCTION                       ********************
 #OBJV:********************************************    -7813.132       **************************************************

 ********************            IMPORTANCE SAMPLING ASSISTED BY MAP ESTIMATION (NO PRIOR)           ********************
 ********************                             FINAL PARAMETER ESTIMATE                           ********************

 THETA - VECTOR OF FIXED EFFECTS PARAMETERS   *********
         TH 1      TH 2      TH 3      TH 4      TH 5      TH 6      TH 7      TH 8      TH 9
         7.50E-01  1.00E+00  1.00E+00  7.00E+00  1.33E+02  2.08E+00  6.81E-01  1.07E-01 -7.92E-02

 OMEGA - COV MATRIX FOR RANDOM EFFECTS - ETAS  ********
         ETA1      ETA2      ETA3      ETA4      ETA5      ETA6
 ETA1
+        1.14E-01
 ETA2
+        0.00E+00  1.00E-04
 ETA3
+        0.00E+00  0.00E+00  3.31E-01
 ETA4
+        0.00E+00  0.00E+00  6.17E-02  2.64E-01
 ETA5
+        0.00E+00  0.00E+00  1.07E-01  8.06E-02  5.06E-01
 ETA6
+        0.00E+00  0.00E+00  2.35E-02  7.59E-04  4.62E-02  1.56E-01

 SIGMA - COV MATRIX FOR RANDOM EFFECTS - EPSILONS  ****
         EPS1
 EPS1
+        3.21E-02

 OMEGA - CORR MATRIX FOR RANDOM EFFECTS - ETAS  *******
         ETA1      ETA2      ETA3      ETA4      ETA5      ETA6
 ETA1
+        3.37E-01
 ETA2
+        0.00E+00  1.00E-02
 ETA3
+        0.00E+00  0.00E+00  5.76E-01
 ETA4
+        0.00E+00  0.00E+00  2.09E-01  5.14E-01
 ETA5
+        0.00E+00  0.00E+00  2.61E-01  2.21E-01  7.11E-01
 ETA6
+        0.00E+00  0.00E+00  1.04E-01  3.74E-03  1.65E-01  3.95E-01

 SIGMA - CORR MATRIX FOR RANDOM EFFECTS - EPSILONS  ***
         EPS1
 EPS1
+        1.79E-01
 #TBLN:      2
 #METH: Objective Function Evaluation by Importance/MAP Sampling (No Prior)
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
 #TERM:
 EXPECTATION ONLY PROCESS WAS NOT COMPLETED

 ETABAR IS THE ARITHMETIC MEAN OF THE ETA-ESTIMATES,
 AND THE P-VALUE IS GIVEN FOR THE NULL HYPOTHESIS THAT THE TRUE MEAN IS 0.

 ETABAR:        -1.9147E-03 -2.0788E-05  3.5527E-03  7.0168E-04 -2.5701E-04  2.0544E-04
 SE:             8.4702E-03  3.1339E-05  1.4733E-02  1.1615E-02  2.0427E-02  9.1886E-03
 N:                     730         730         730         730         730         730

 P VAL.:         8.2116E-01  5.0711E-01  8.0945E-01  9.5183E-01  9.8996E-01  9.8216E-01

 ETASHRINKSD(%)  3.2121E+01  9.1527E+01  3.0789E+01  3.8895E+01  2.2353E+01  3.7028E+01
 ETASHRINKVR(%)  5.3925E+01  9.9282E+01  5.2099E+01  6.2661E+01  3.9709E+01  6.0345E+01
 EBVSHRINKSD(%)  3.1847E+01  9.2967E+01  3.0912E+01  3.8810E+01  2.2261E+01  3.7325E+01
 EBVSHRINKVR(%)  5.3552E+01  9.9505E+01  5.2269E+01  6.2558E+01  3.9567E+01  6.0719E+01
 RELATIVEINF(%)  4.6427E+01  4.3833E-01  5.8936E-01  4.3203E-01  1.1392E+00  3.7924E+01
 EPSSHRINKSD(%)  1.6442E+01
 EPSSHRINKVR(%)  3.0180E+01


 TOTAL DATA POINTS NORMALLY DISTRIBUTED (N):         6222
 N*LOG(2PI) CONSTANT TO OBJECTIVE FUNCTION:    11435.271107198947
 OBJECTIVE FUNCTION VALUE WITHOUT CONSTANT:   -7808.3596555994955
 OBJECTIVE FUNCTION VALUE WITH CONSTANT:       3626.9114515994515
 REPORTED OBJECTIVE FUNCTION DOES NOT CONTAIN CONSTANT

 TOTAL EFFECTIVE ETAS (NIND*NETA):                          4380


 #TERE:
 Elapsed estimation  time in seconds:   200.50
 Elapsed covariance  time in seconds:     0.22

 ********************       OBJECTIVE FUNCTION EVALUATION BY IMPORTANCE/MAP SAMPLING (NO PRIOR)      ********************
 #OBJT:**************                        FINAL VALUE OF OBJECTIVE FUNCTION                       ********************
 #OBJV:********************************************    -7808.360       **************************************************

 ********************       OBJECTIVE FUNCTION EVALUATION BY IMPORTANCE/MAP SAMPLING (NO PRIOR)      ********************
 ********************                             FINAL PARAMETER ESTIMATE                           ********************

 THETA - VECTOR OF FIXED EFFECTS PARAMETERS   *********
         TH 1      TH 2      TH 3      TH 4      TH 5      TH 6      TH 7      TH 8      TH 9
         7.50E-01  1.00E+00  1.00E+00  7.00E+00  1.33E+02  2.08E+00  6.81E-01  1.07E-01 -7.92E-02

 OMEGA - COV MATRIX FOR RANDOM EFFECTS - ETAS  ********
         ETA1      ETA2      ETA3      ETA4      ETA5      ETA6
 ETA1
+        1.14E-01
 ETA2
+        0.00E+00  1.00E-04
 ETA3
+        0.00E+00  0.00E+00  3.31E-01
 ETA4
+        0.00E+00  0.00E+00  6.17E-02  2.64E-01
 ETA5
+        0.00E+00  0.00E+00  1.07E-01  8.06E-02  5.06E-01
 ETA6
+        0.00E+00  0.00E+00  2.35E-02  7.59E-04  4.62E-02  1.56E-01

 SIGMA - COV MATRIX FOR RANDOM EFFECTS - EPSILONS  ****
         EPS1
 EPS1
+        3.21E-02

 OMEGA - CORR MATRIX FOR RANDOM EFFECTS - ETAS  *******
         ETA1      ETA2      ETA3      ETA4      ETA5      ETA6
 ETA1
+        3.37E-01
 ETA2
+        0.00E+00  1.00E-02
 ETA3
+        0.00E+00  0.00E+00  5.76E-01
 ETA4
+        0.00E+00  0.00E+00  2.09E-01  5.14E-01
 ETA5
+        0.00E+00  0.00E+00  2.61E-01  2.21E-01  7.11E-01
 ETA6
+        0.00E+00  0.00E+00  1.04E-01  3.74E-03  1.65E-01  3.95E-01

 SIGMA - CORR MATRIX FOR RANDOM EFFECTS - EPSILONS  ***
         EPS1
 EPS1
+        1.79E-01

 ********************       OBJECTIVE FUNCTION EVALUATION BY IMPORTANCE/MAP SAMPLING (NO PRIOR)      ********************
 ********************                          STANDARD ERROR OF ESTIMATE (S)                        ********************

 THETA - VECTOR OF FIXED EFFECTS PARAMETERS   *********
         TH 1      TH 2      TH 3      TH 4      TH 5      TH 6      TH 7      TH 8      TH 9
         0.00E+00  0.00E+00  0.00E+00  1.95E-01  4.57E+00  6.73E-02  4.83E-03  1.91E-02  1.95E-02

 OMEGA - COV MATRIX FOR RANDOM EFFECTS - ETAS  ********
         ETA1      ETA2      ETA3      ETA4      ETA5      ETA6
 ETA1
+        1.22E-02
 ETA2
+        0.00E+00  0.00E+00
 ETA3
+        0.00E+00  0.00E+00  3.52E-01
 ETA4
+        0.00E+00  0.00E+00  2.49E-01  3.30E-01
 ETA5
+        0.00E+00  0.00E+00  3.10E-01  3.02E-01  4.68E-01
 ETA6
+        0.00E+00  0.00E+00  1.55E-01  1.55E-01  1.56E-01  1.74E-02

 SIGMA - COV MATRIX FOR RANDOM EFFECTS - EPSILONS  ****
         EPS1
 EPS1
+        1.24E-03

 OMEGA - CORR MATRIX FOR RANDOM EFFECTS - ETAS  *******
         ETA1      ETA2      ETA3      ETA4      ETA5      ETA6
 ETA1
+        1.81E-02
 ETA2
+       ......... .........
 ETA3
+       ......... .........  3.05E-01
 ETA4
+       ......... .........  6.68E-01  3.21E-01
 ETA5
+       ......... .........  5.68E-01  6.56E-01  3.29E-01
 ETA6
+       ......... .........  6.81E-01  7.66E-01  5.54E-01  2.20E-02

 SIGMA - CORR MATRIX FOR RANDOM EFFECTS - EPSILONS  ***
         EPS1
 EPS1
+        3.47E-03
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
 ********************       OBJECTIVE FUNCTION EVALUATION BY IMPORTANCE/MAP SAMPLING (NO PRIOR)      ********************
 ********************                    EIGENVALUES OF COR MATRIX OF ESTIMATE (S)                   ********************

             1         2         3         4         5         6         7         8         9        10        11        12
             13        14        15        16        17        18
         1.38E-03  1.75E-03  2.25E-03  5.25E-03  8.96E-03  2.94E-01  4.66E-01  7.13E-01  7.41E-01  8.79E-01  9.57E-01  1.17E+00
          1.25E+00  1.36E+00  1.45E+00  2.26E+00  2.74E+00  3.70E+00
 Elapsed postprocess time in seconds:     1.52
 Elapsed finaloutput time in seconds:     2.25
 #CPUT: Total CPU Time in Seconds,      754.376
