;; 1. Based on: Without $THETAI and $THETAR
;; 2. Description:
;;    Removing MIX
$SIZES      PD=-51
$PROBLEM    A4091011
$INPUT      PROT NSID OID AMT DOSE TIME DAY EDAY TAFD CMT NLINE TYPE
            SORT OCCW OCCD AGE SEX RACE WT BWT BMI BBMI BSA BBSA BLBW
            ODV DV RATE CCL STUT NTPD ID BCCL LBWT LBLBW LBBMI LBBSA
            LAGE LBCCL MDV FREMTYPE
$DATA      frem6.dir/frem_dataset.dta IGNORE=@
$SUBROUTINE ADVAN6 TOL=6
$MODEL      COMP=(CENTRAL) COMP=(PERIPH)
$PK

 TVCL = THETA(1)
 TVV1 = THETA(2)
 TVQ  = THETA(3)
 TVV2 = THETA(4)
 TVKM = THETA(5)
 TVVM = THETA(6)

 MU_1 = LOG(TVCL)
 MU_2 = LOG(TVV1)
 MU_3 = LOG(TVQ)
 MU_4 = LOG(TVV2)
 MU_5 = LOG(TVKM)
 MU_6 = LOG(TVVM)

 CL = EXP(MU_1 + ETA(1))
 V1 = EXP(MU_2 + ETA(2))
 Q  = EXP(MU_3 + ETA(3))
 V2 = EXP(MU_4 + ETA(4))
 KM = EXP(MU_5 + ETA(5))
 VM = EXP(MU_6 + ETA(6))

 S1=V1

 K10 = CL/V1
 K12 = Q/V1
 K21 = Q/V2

     MU_7 = THETA(7)
     COV7 = MU_7 + ETA(7)
     MU_8 = THETA(8)
     COV8 = MU_8 + ETA(8)
     MU_9 = THETA(9)
     COV9 = MU_9 + ETA(9)
     MU_10 = THETA(10)
     COV10 = MU_10 + ETA(10)
     MU_11 = THETA(11)
     COV11 = MU_11 + ETA(11)
     MU_12 = THETA(12)
     COV12 = MU_12 + ETA(12)
     MU_13 = THETA(13)
     COV13 = MU_13 + ETA(13)
     MU_14 = THETA(14)
     COV14 = MU_14 + ETA(14)
     MU_15 = THETA(15)
     COV15 = MU_15 + ETA(15)
     MU_16 = THETA(16)
     COV16 = MU_16 + ETA(16)
     MU_17 = THETA(17)
     COV17 = MU_17 + ETA(17)
$DES
 CP = A(1)/V1
 ELIM = CP*VM/(KM+CP)

 DADT(1) = K21*A(2) - K12*A(1) - K10*A(1) -ELIM
 DADT(2) = K12*A(1) - K21*A(2)

$ERROR
 ;(OBSERVATION ONLY)

 IPRED = LOG(1)
 IF(F.GT.0) IPRED = LOG(F)

 W     = 1
 IRES  = DV-IPRED
 IWRES = IRES/W

 RES  = EPS(1)

 Y = IPRED+W*RES


;;;FREM CODE BEGIN COMPACT
;;;DO NOT MODIFY
     IF (FREMTYPE.EQ.100) THEN
;       LBWT  1
        Y = COV7 + EPS(2)
        IPRED = COV7
     END IF
     IF (FREMTYPE.EQ.200) THEN
;       LBLBW  1
        Y = COV8 + EPS(2)
        IPRED = COV8
     END IF
     IF (FREMTYPE.EQ.300) THEN
;       LBBMI  1
        Y = COV9 + EPS(2)
        IPRED = COV9
     END IF
     IF (FREMTYPE.EQ.400) THEN
;       LBBSA  1
        Y = COV10 + EPS(2)
        IPRED = COV10
     END IF
     IF (FREMTYPE.EQ.500) THEN
;       LAGE  1
        Y = COV11 + EPS(2)
        IPRED = COV11
     END IF
     IF (FREMTYPE.EQ.600) THEN
;       LBCCL  1
        Y = COV12 + EPS(2)
        IPRED = COV12
     END IF
     IF (FREMTYPE.EQ.700) THEN
;       DOSE_10  1
        Y = COV13 + EPS(2)
        IPRED = COV13
     END IF
     IF (FREMTYPE.EQ.800) THEN
;       DOSE_5  1
        Y = COV14 + EPS(2)
        IPRED = COV14
     END IF
     IF (FREMTYPE.EQ.900) THEN
;       SEX  1
        Y = COV15 + EPS(2)
        IPRED = COV15
     END IF
     IF (FREMTYPE.EQ.1000) THEN
;       RACE  1
        Y = COV16 + EPS(2)
        IPRED = COV16
     END IF
     IF (FREMTYPE.EQ.1100) THEN
;       STUT  1
        Y = COV17 + EPS(2)
        IPRED = COV17
     END IF
;;;FREM CODE END COMPACT
$THETA  0.136181 ; CL
 2.89484 ; V
 0.454902 ; Q
 2.05966 ; V2
 29.7871 ; KM
 12.136 ; VM
$THETA  4.4403332589 FIX ; TV_LBWT
 4.01326 ; TV_LBLBW
 3.39594 ; TV_LBBMI
 0.668668 ; TV_LBBSA
 4.10201911346 FIX ; TV_LAGE
 4.53098 ; TV_LBCCL
 0.412935323383 FIX ; TV_DOSE_10
 0.407338308458 FIX ; TV_DOSE_5
 1.60509950249 FIX ; TV_SEX
 1.13619402985 FIX ; TV_RACE
 1.3078358209 FIX ; TV_STUT
$OMEGA  BLOCK(17)
 0.12046  ;     IIV CL
 0.102675 0.127521  ;     IIV V1
 0.245521 0.264004 0.711076  ;      IIV Q
 0.0693543 0.0864554 0.0730441 0.14141  ;     IIV V2
 0.336616 0.172693 0.45531 0.173573 1.30938  ;     IIV KM
 0.210905 0.127853 0.252579 0.169228 0.795338 0.520519  ;     IIV VM
 0.03934 0.0321758 0.065147 0.0315354 0.121876 0.0799175 0.0432593  ;   BSV_LBWT
 0.0339788 0.0316283 0.0586382 0.0325494 0.0960718 0.066826 0.0307176 0.0360525  ;  BSV_LBLBW
 0.0222344 0.0149103 0.034294 0.0135729 0.0772529 0.0472557 0.0285714 0.0101579 0.0286751  ;  BSV_LBBMI
 0.022922 0.0199471 0.0389215 0.0199022 0.0679224 0.0457725 0.0237023 0.0205021 0.012099 0.0142784  ;  BSV_LBBSA
 -0.00943189 -0.006128 -0.014728 -0.00498722 -0.0341183 -0.0192622 -0.00631491 -0.00430801 -0.00295719 -0.00389228 0.0317602  ;   BSV_LAGE
 0.0478128 0.0367694 0.078458 0.0339103 0.154658 0.0969375 0.0430858 0.0282773 0.0292735 0.0233115 -0.035765 0.103696  ;  BSV_LBCCL
 -0.00134025 0.00735055 0.00915972 0.00300109 -0.0242655 -0.0164775 -0.000148915 -0.000725323 -1.81443E-05 -0.000105326 -0.00115425 0.00335429
 0.242571  ; BSV_DOSE_10
 0.0116915 0.00386391 0.0185061 0.00311752 0.053798 0.0279307 0.00110107 0.000334518 0.00175577 0.000212974 -1.99929E-05 -0.00150571 -0.168309
 0.241564  ; BSV_DOSE_5
 -0.0643694 -0.064571 -0.109202 -0.0717681 -0.175906 -0.127007 -0.0436991 -0.0759188 -0.0033873 -0.0331627 -0.000438357 -0.0305633 0.0013772
 -0.000211956 0.239103  ;    BSV_SEX
 0.00832583 -0.000963693 -0.00456406 0.00277227 0.05292 0.0282651 0.00456526 -0.000234154 0.0046088 0.00192157 -0.00775976 0.00581761 0.00782056
 -0.00572959 0.00403491 0.117719  ;   BSV_RACE
 -0.0119991 -0.0157672 -0.036027 -0.00639713 -0.0205366 -0.00817608 -0.0095269 -0.0024388 -0.0106356 -0.00366198 0.00385735 -0.0155166 -0.0195414
 -0.0159501 -0.000326419 -0.0033704 0.213205  ;   BSV_STUT
$SIGMA  0.0556305  ;       Res1
$SIGMA  1E-07  FIX  ;     EPSCOV
$ESTIMATION METHOD=ITS NITER=0 NOCOV=1
$ESTIMATION METHOD=IMPMAP AUTO=1 RANMETHOD=3P INTER NOABORT PRINT=1
            CITER=15 NOCOV=1 ISAMPEND=100 NITER=100 ISAMPLE=300
            CTYPE=1 CALPHA=0.01 SIGL=6 NSIG=2
$ESTIMATION METHOD=IMPMAP INTER EONLY=1 NITER=5 ISAMPLE=1000 NOCOV=0
$COVARIANCE PRINT=E UNCONDITIONAL UNCONDITIONAL
$TABLE ID NTPD AMT DOSE PROT DV TIME FREMTYPE
       NOPRINT ONEHEADER FILE=xptab7
